<Lems xmlns="http://www.neuroml.org/lems/0.7.2" xmlns:xsi="http://www.w3.org/2001/XMLSchema-instance" xsi:schemaLocation="http://www.neuroml.org/lems/0.7.2  https://raw.github.com/LEMS/LEMS/development/Schemas/LEMS/LEMS_v0.7.2.xsd">

    <DefaultRun component="sim1" reportFile="/home2/dilawar/Work/github/neurons_sim/neuroConstructProjects/twoNeurons/simulations/Sim_5/simulator.props" timesFile="/home2/dilawar/Work/github/neurons_sim/neuroConstructProjects/twoNeurons/simulations/Sim_5/time.dat"/>

        <!--Include standard NeuroML 2 ComponentType definitions-->

    <Include file="NeuroML2CoreTypes/Cells.xml"/>
    <Include file="NeuroML2CoreTypes/Networks.xml"/>
    <Include file="NeuroML2CoreTypes/Simulation.xml"/>

    <Include file="NeuroML2CoreTypes/PyNN.xml"/>

        <!--Include the generated NeuroML 2 files-->

        <!--   Channel/synapse files-->
    <Include file="SingleSyn1.nml"/>
        <!--   Cell files-->
    <Include file="PurkinjeCell_t.nml"/>
    <Include file="SimpleCell_t.nml"/>
        <!--   Network file-->
    <Include file="twoNeurons.nml"/>

        <!--Note: this could be: Simulation id="sim1" ... , but Component type="Simulation" ...
        is used to allow validation of this file according to the LEMS schema specified above...-->
    <Component type="Simulation" id="sim1" length="100.0ms" step="0.02ms" target="network_twoNeurons">

        <Display id="PurkinjeCellGroup_v" title="twoNeurons: Default Simulation Configuration, PurkinjeCellGroup, VOLTAGE" timeScale="1ms">
            <Line id="VOLTAGE-PurkinjeCellGroup_0" quantity="PurkinjeCellGroup[0]/v" scale="1 mV" color="#000000" save="/home2/dilawar/Work/github/neurons_sim/neuroConstructProjects/twoNeurons/simulations/Sim_5/PurkinjeCellGroup_0.dat"/>
        </Display>

        <Display id="SimpleCellGroup_v" title="twoNeurons: Default Simulation Configuration, SimpleCellGroup, VOLTAGE" timeScale="1ms">
            <Line id="VOLTAGE-SimpleCellGroup_0" quantity="SimpleCellGroup[0]/v" scale="1 mV" color="#000000" save="/home2/dilawar/Work/github/neurons_sim/neuroConstructProjects/twoNeurons/simulations/Sim_5/SimpleCellGroup_0.dat"/>
        </Display>
    </Component>

</Lems>
